!20160809 樹脂せん断引張TPのモデル作成

!TYPE 4:Cu-樹脂　TYPE5:都合で作った樹脂樹脂接合 TYPE 6:はんだ-樹脂　TYPE:7 Si-樹脂

!評価する周辺のメッシュサイズは450um x 450um x 40um(t)に設定した

/CWD,C:\Users\Documents\ANSYS_CAE\PULLTEST

fini
/clear
/prep7

*SET,MAG,0.001	!SI単位にそろえるための係数 mm→mに変換

!------------パラメータの変更はここだけをいじって--------------------------------
*SET,BUSX,1*MAG	!BUS部分のメッシュ分割サイズ
*SET,BUSY,1*MAG
*SET,BUSZ,0.5*MAG

*SET,Tatm,20	!雰囲気温度
*SET,M_SOLX,0.45*MAG	!評価部位のメッシュサイズ X
*SET,M_SOLY,0.45*MAG	!評価部位のメッシュサイズ Y
*SET,M_SOLZ,0.04*MAG	!評価部位のメッシュサイズ Z

*SET,M_RESINX,1*MAG	!樹脂メッシュのサイズX
*SET,M_RESINY,1*MAG	!樹脂メッシュのサイズY
*SET,M_RESINZ,1*MAG	!樹脂メッシュのサイズZ

*SET,DEPTH,5*MAG	!バスの強度評価部位の没入深さ
*SET,BUSW,10*MAG	!バス幅
*SET,BUSL,45*MAG	!バスの長さ　没入深さ込みで
*SET,BUST,1*MAG		!バス厚み
*SET,BUSFINE,5*MAG	!細かいメッシュを続けるバスの長さ　没入深さは含まず

!△形状のボリュームのメッシュの注意　各辺の分割数は等しく、偶数でなければならない

*SET,RESINH,20*MAG
*SET,RESINW,30*MAG
*SET,RESINT,7*MAG

*SET,TBUSL,52*MAG	!Tの字バスの全長
*SET,TBUSW,10*MAG
*SET,TBUST,1*MAG

TBUST=BUST

*SET,TBUSARM,5*MAG	!Tバスの片腕長さ
*SET,TBUSARMW,7*MAG	!Tバスの腕の幅

*SET,TBUSDEPTH,9.5*MAG	!Tバス先端の樹脂下面からの深さ

*SET,FINERESINW,2*MAG
*SET,FINERESINT,1*MAG

*SET,LOADFULL,100	!フルモデルの荷重　引張が正にしている
!------------------------------------------

*SET,LOAD	!引張荷重 N

LOAD=-1*LOADFULL/2	!ハーフモデルにつき1/2化 もともと正は圧力なので、符号を負にして引張に変えている

*SET,pi,3.1415926535
*SET,DRAFT,5	!金型の抜き勾配
*SET,TAN5
TAN5=TAN(DRAFT/180*pi)
!---XYZ辺のメッシュ分割数が入る変数
*SET,DX
*SET,DY
*SET,DZ

*SET,ii
*SET,jj

*SET,S1	!引っ張る面の面積が入る　AREA 14
*SET,P1 !引っ張る面圧


!Y軸で切った、ハーフモデル
*DIM,BUSTOP,ARRAY,2,3,3 !上が2としよう　X1～X3,Y1～Y3,Z1～Z3 座標は左下から、反時計回り
!原点は、今回は樹脂の中心とする
!▽部分
BUSTOP(1,1,1)=0
BUSTOP(1,1,2)=RESINH/2-DEPTH
BUSTOP(1,1,3)=-1*BUST/2
BUSTOP(1,2,1)=0
BUSTOP(1,2,2)=RESINH/2
BUSTOP(1,2,3)=-1*BUST/2
BUSTOP(1,3,1)=-1*BUSW/2
BUSTOP(1,3,2)=RESINH/2
BUSTOP(1,3,3)=-1*BUST/2
BUSTOP(2,1,1)=0
BUSTOP(2,1,2)=RESINH/2-DEPTH
BUSTOP(2,1,3)=BUST/2
BUSTOP(2,2,1)=0
BUSTOP(2,2,2)=RESINH/2
BUSTOP(2,2,3)=BUST/2
BUSTOP(2,3,1)=-1*BUSW/2
BUSTOP(2,3,2)=RESINH/2
BUSTOP(2,3,3)=BUST/2

*DIM,BUS2ND,ARRAY,2,4,3 !上が2としよう　X1～X4,Y1～Y4,Z1～Z4 座標は左下から、反時計回り
BUS2ND(1,1,1)=-1*BUSW/2
BUS2ND(1,1,2)=RESINH/2
BUS2ND(1,1,3)=-1*BUST/2
BUS2ND(1,2,1)=0
BUS2ND(1,2,2)=RESINH/2
BUS2ND(1,2,3)=-1*BUST/2
BUS2ND(1,3,1)=0
BUS2ND(1,3,2)=RESINH/2+BUSFINE
BUS2ND(1,3,3)=-1*BUST/2
BUS2ND(1,4,1)=-1*BUSW/2
BUS2ND(1,4,2)=RESINH/2+BUSFINE
BUS2ND(1,4,3)=-1*BUST/2
BUS2ND(2,1,1)=-1*BUSW/2
BUS2ND(2,1,2)=RESINH/2
BUS2ND(2,1,3)=BUST/2
BUS2ND(2,2,1)=0
BUS2ND(2,2,2)=RESINH/2
BUS2ND(2,2,3)=BUST/2
BUS2ND(2,3,1)=0
BUS2ND(2,3,2)=RESINH/2+BUSFINE
BUS2ND(2,3,3)=BUST/2
BUS2ND(2,4,1)=-1*BUSW/2
BUS2ND(2,4,2)=RESINH/2+BUSFINE
BUS2ND(2,4,3)=BUST/2

*DIM,BUS3RD,ARRAY,2,4,3 !上が2としよう　X1～X4,Y1～Y4,Z1～Z4 座標は左下から、反時計回り
BUS3RD(1,1,1)=-1*BUSW/2
BUS3RD(1,1,2)=RESINH/2+BUSFINE
BUS3RD(1,1,3)=-1*BUST/2
BUS3RD(1,2,1)=0
BUS3RD(1,2,2)=RESINH/2+BUSFINE
BUS3RD(1,2,3)=-1*BUST/2
BUS3RD(1,3,1)=0
BUS3RD(1,3,2)=RESINH/2+BUSL-DEPTH
BUS3RD(1,3,3)=-1*BUST/2
BUS3RD(1,4,1)=-1*BUSW/2
BUS3RD(1,4,2)=RESINH/2+BUSL-DEPTH
BUS3RD(1,4,3)=-1*BUST/2
BUS3RD(2,1,1)=-1*BUSW/2
BUS3RD(2,1,2)=RESINH/2+BUSFINE
BUS3RD(2,1,3)=BUST/2
BUS3RD(2,2,1)=0
BUS3RD(2,2,2)=RESINH/2+BUSFINE
BUS3RD(2,2,3)=BUST/2
BUS3RD(2,3,1)=0
BUS3RD(2,3,2)=RESINH/2+BUSL-DEPTH
BUS3RD(2,3,3)=BUST/2
BUS3RD(2,4,1)=-1*BUSW/2
BUS3RD(2,4,2)=RESINH/2+BUSL-DEPTH
BUS3RD(2,4,3)=BUST/2

*DIM,FINERESINTRI,ARRAY,2,3,3	!細かい樹脂の△の部分
FINERESINTRI(1,1,1)=-1*BUSW/2
FINERESINTRI(1,1,2)=RESINH/2-DEPTH
FINERESINTRI(1,1,3)=-1*BUST/2
FINERESINTRI(1,2,1)=0
FINERESINTRI(1,2,2)=RESINH/2-DEPTH
FINERESINTRI(1,2,3)=-1*BUST/2
FINERESINTRI(1,3,1)=-1*BUSW/2
FINERESINTRI(1,3,2)=RESINH/2
FINERESINTRI(1,3,3)=-1*BUST/2
FINERESINTRI(2,1,1)=FINERESINTRI(1,1,1)
FINERESINTRI(2,1,2)=FINERESINTRI(1,1,2)
FINERESINTRI(2,1,3)=FINERESINTRI(1,1,3)+BUST
FINERESINTRI(2,2,1)=FINERESINTRI(1,2,1)
FINERESINTRI(2,2,2)=FINERESINTRI(1,2,2)
FINERESINTRI(2,2,3)=FINERESINTRI(1,2,3)+BUST
FINERESINTRI(2,3,1)=FINERESINTRI(1,3,1)
FINERESINTRI(2,3,2)=FINERESINTRI(1,3,2)
FINERESINTRI(2,3,3)=FINERESINTRI(1,3,3)+BUST

*DIM,FINERESIN,ARR4,5,2,4,3	!細かい樹脂 □の部分　全部で5個　(三角形の下、斜め下、横　下段　上段)
FINERESIN(1,1,1,1)=FINERESINTRI(1,1,1)
FINERESIN(1,1,1,2)=FINERESINTRI(1,1,2)-FINERESINW
FINERESIN(1,1,1,3)=FINERESINTRI(1,1,3)
FINERESIN(1,1,2,1)=FINERESINTRI(1,2,1)
FINERESIN(1,1,2,2)=FINERESINTRI(1,2,2)-FINERESINW
FINERESIN(1,1,2,3)=FINERESINTRI(1,2,3)
FINERESIN(1,1,3,1)=FINERESINTRI(1,2,1)
FINERESIN(1,1,3,2)=FINERESINTRI(1,2,2)
FINERESIN(1,1,3,3)=FINERESINTRI(1,2,3)
FINERESIN(1,1,4,1)=FINERESINTRI(1,1,1)
FINERESIN(1,1,4,2)=FINERESINTRI(1,1,2)
FINERESIN(1,1,4,3)=FINERESINTRI(1,1,3)
FINERESIN(1,2,1,1)=FINERESIN(1,1,1,1)
FINERESIN(1,2,1,2)=FINERESIN(1,1,1,2)
FINERESIN(1,2,1,3)=FINERESIN(1,1,1,3)+BUST
FINERESIN(1,2,2,1)=FINERESIN(1,1,2,1)
FINERESIN(1,2,2,2)=FINERESIN(1,1,2,2)
FINERESIN(1,2,2,3)=FINERESIN(1,1,2,3)+BUST
FINERESIN(1,2,3,1)=FINERESIN(1,1,3,1)
FINERESIN(1,2,3,2)=FINERESIN(1,1,3,2)
FINERESIN(1,2,3,3)=FINERESIN(1,1,3,3)+BUST
FINERESIN(1,2,4,1)=FINERESIN(1,1,4,1)
FINERESIN(1,2,4,2)=FINERESIN(1,1,4,2)
FINERESIN(1,2,4,3)=FINERESIN(1,1,4,3)+BUST

FINERESIN(2,1,1,1)=FINERESINTRI(1,1,1)-FINERESINW
FINERESIN(2,1,1,2)=FINERESIN(1,1,1,2)
FINERESIN(2,1,1,3)=FINERESIN(1,1,1,3)
FINERESIN(2,1,2,1)=FINERESINTRI(1,1,1)
FINERESIN(2,1,2,2)=FINERESIN(1,1,2,2)
FINERESIN(2,1,2,3)=FINERESIN(1,1,2,3)
FINERESIN(2,1,3,1)=FINERESINTRI(1,1,1)
FINERESIN(2,1,3,2)=FINERESIN(1,1,3,2)
FINERESIN(2,1,3,3)=FINERESIN(1,1,3,3)
FINERESIN(2,1,4,1)=FINERESINTRI(1,1,1)-FINERESINW
FINERESIN(2,1,4,2)=FINERESIN(1,1,4,2)
FINERESIN(2,1,4,3)=FINERESIN(1,1,4,3)
FINERESIN(2,2,1,1)=FINERESIN(2,1,1,1)
FINERESIN(2,2,1,2)=FINERESIN(2,1,1,2)
FINERESIN(2,2,1,3)=FINERESIN(2,1,1,3)+BUST
FINERESIN(2,2,2,1)=FINERESIN(2,1,2,1)
FINERESIN(2,2,2,2)=FINERESIN(2,1,2,2)
FINERESIN(2,2,2,3)=FINERESIN(2,1,2,3)+BUST
FINERESIN(2,2,3,1)=FINERESIN(2,1,3,1)
FINERESIN(2,2,3,2)=FINERESIN(2,1,3,2)
FINERESIN(2,2,3,3)=FINERESIN(2,1,3,3)+BUST
FINERESIN(2,2,4,1)=FINERESIN(2,1,4,1)
FINERESIN(2,2,4,2)=FINERESIN(2,1,4,2)
FINERESIN(2,2,4,3)=FINERESIN(2,1,4,3)+BUST

FINERESIN(3,1,1,1)=FINERESIN(2,1,1,1)
FINERESIN(3,1,1,2)=FINERESIN(2,1,1,2)+FINERESINW
FINERESIN(3,1,1,3)=FINERESIN(2,1,1,3)
FINERESIN(3,1,2,1)=FINERESIN(2,1,2,1)
FINERESIN(3,1,2,2)=FINERESIN(2,1,2,2)+FINERESINW
FINERESIN(3,1,2,3)=FINERESIN(2,1,2,3)
FINERESIN(3,1,3,1)=FINERESIN(2,1,2,1)
FINERESIN(3,1,3,2)=FINERESIN(2,1,2,2)+FINERESINW+DEPTH
FINERESIN(3,1,3,3)=FINERESIN(2,1,2,3)
FINERESIN(3,1,4,1)=FINERESIN(2,1,1,1)
FINERESIN(3,1,4,2)=FINERESIN(2,1,1,2)+FINERESINW+DEPTH
FINERESIN(3,1,4,3)=FINERESIN(2,1,1,3)
FINERESIN(3,2,1,1)=FINERESIN(3,1,1,1)
FINERESIN(3,2,1,2)=FINERESIN(3,1,1,2)
FINERESIN(3,2,1,3)=FINERESIN(3,1,1,3)+BUST
FINERESIN(3,2,2,1)=FINERESIN(3,1,2,1)
FINERESIN(3,2,2,2)=FINERESIN(3,1,2,2)
FINERESIN(3,2,2,3)=FINERESIN(3,1,2,3)+BUST
FINERESIN(3,2,3,1)=FINERESIN(3,1,3,1)
FINERESIN(3,2,3,2)=FINERESIN(3,1,3,2)
FINERESIN(3,2,3,3)=FINERESIN(3,1,3,3)+BUST
FINERESIN(3,2,4,1)=FINERESIN(3,1,4,1)
FINERESIN(3,2,4,2)=FINERESIN(3,1,4,2)
FINERESIN(3,2,4,3)=FINERESIN(3,1,4,3)+BUST

FINERESIN(4,1,1,1)=FINERESIN(2,1,1,1)
FINERESIN(4,1,1,2)=FINERESIN(2,1,1,2)
FINERESIN(4,1,1,3)=FINERESIN(2,1,1,3)+BUST
FINERESIN(4,1,2,1)=FINERESIN(1,1,2,1)
FINERESIN(4,1,2,2)=FINERESIN(1,1,2,2)
FINERESIN(4,1,2,3)=FINERESIN(1,1,2,3)+BUST
FINERESIN(4,1,3,1)=FINERESIN(1,1,2,1)
FINERESIN(4,1,3,2)=RESINH/2
FINERESIN(4,1,3,3)=FINERESIN(1,1,2,3)+BUST
FINERESIN(4,1,4,1)=FINERESIN(3,1,4,1)
FINERESIN(4,1,4,2)=FINERESIN(3,1,4,2)
FINERESIN(4,1,4,3)=FINERESIN(3,1,4,3)+BUST
FINERESIN(4,2,1,1)=FINERESIN(4,1,1,1)
FINERESIN(4,2,1,2)=FINERESIN(4,1,1,2)
FINERESIN(4,2,1,3)=FINERESIN(4,1,1,3)+FINERESINT
FINERESIN(4,2,2,1)=FINERESIN(4,1,2,1)
FINERESIN(4,2,2,2)=FINERESIN(4,1,2,2)
FINERESIN(4,2,2,3)=FINERESIN(4,1,2,3)+FINERESINT
FINERESIN(4,2,3,1)=FINERESIN(4,1,3,1)
FINERESIN(4,2,3,2)=FINERESIN(4,1,3,2)
FINERESIN(4,2,3,3)=FINERESIN(4,1,3,3)+FINERESINT
FINERESIN(4,2,4,1)=FINERESIN(4,1,4,1)
FINERESIN(4,2,4,2)=FINERESIN(4,1,4,2)
FINERESIN(4,2,4,3)=FINERESIN(4,1,4,3)+FINERESINT

FINERESIN(5,1,1,1)=FINERESIN(4,1,1,1)
FINERESIN(5,1,1,2)=FINERESIN(4,1,1,2)
FINERESIN(5,1,1,3)=FINERESIN(4,1,1,3)-BUST-FINERESINT
FINERESIN(5,1,2,1)=FINERESIN(4,1,2,1)
FINERESIN(5,1,2,2)=FINERESIN(4,1,2,2)
FINERESIN(5,1,2,3)=FINERESIN(4,1,2,3)-BUST-FINERESINT
FINERESIN(5,1,3,1)=FINERESIN(4,1,3,1)
FINERESIN(5,1,3,2)=FINERESIN(4,1,3,2)
FINERESIN(5,1,3,3)=FINERESIN(4,1,3,3)-BUST-FINERESINT
FINERESIN(5,1,4,1)=FINERESIN(4,1,4,1)
FINERESIN(5,1,4,2)=FINERESIN(4,1,4,2)
FINERESIN(5,1,4,3)=FINERESIN(4,1,4,3)-BUST-FINERESINT
FINERESIN(5,2,1,1)=FINERESIN(4,2,1,1)
FINERESIN(5,2,1,2)=FINERESIN(4,2,1,2)
FINERESIN(5,2,1,3)=FINERESIN(4,2,1,3)-BUST-FINERESINT
FINERESIN(5,2,2,1)=FINERESIN(4,2,2,1)
FINERESIN(5,2,2,2)=FINERESIN(4,2,2,2)
FINERESIN(5,2,2,3)=FINERESIN(4,2,2,3)-BUST-FINERESINT
FINERESIN(5,2,3,1)=FINERESIN(4,2,3,1)
FINERESIN(5,2,3,2)=FINERESIN(4,2,3,2)
FINERESIN(5,2,3,3)=FINERESIN(4,2,3,3)-BUST-FINERESINT
FINERESIN(5,2,4,1)=FINERESIN(4,2,4,1)
FINERESIN(5,2,4,2)=FINERESIN(4,2,4,2)
FINERESIN(5,2,4,3)=FINERESIN(4,2,4,3)-BUST-FINERESINT

!ここまで、引き抜くバスと、その周りの細かい樹脂の座標までを規定した

*DIM,TBUS,ARR4,3,2,4,3	!Tの字BUSの下から３つの□で座標を表現
TBUS(1,1,1,1)=-1*TBUSW/2
TBUS(1,1,1,2)=-1*RESINH/2-1*TBUSL+TBUSDEPTH
TBUS(1,1,1,3)=-1*TBUST/2
TBUS(1,1,2,1)=0
TBUS(1,1,2,2)=-1*RESINH/2-1*TBUSL+TBUSDEPTH
TBUS(1,1,2,3)=-1*TBUST/2
TBUS(1,1,3,1)=0
TBUS(1,1,3,2)=-1*RESINH/2+TBUSDEPTH-TBUSARMW
TBUS(1,1,3,3)=-1*TBUST/2
TBUS(1,1,4,1)=-1*TBUSW/2
TBUS(1,1,4,2)=-1*RESINH/2+TBUSDEPTH-TBUSARMW
TBUS(1,1,4,3)=-1*TBUST/2
TBUS(1,2,1,1)=TBUS(1,1,1,1)
TBUS(1,2,1,2)=TBUS(1,1,1,2)
TBUS(1,2,1,3)=TBUS(1,1,1,3)+TBUST
TBUS(1,2,2,1)=TBUS(1,1,2,1)
TBUS(1,2,2,2)=TBUS(1,1,2,2)
TBUS(1,2,2,3)=TBUS(1,1,2,3)+TBUST
TBUS(1,2,3,1)=TBUS(1,1,3,1)
TBUS(1,2,3,2)=TBUS(1,1,3,2)
TBUS(1,2,3,3)=TBUS(1,1,3,3)+TBUST
TBUS(1,2,4,1)=TBUS(1,1,4,1)
TBUS(1,2,4,2)=TBUS(1,1,4,2)
TBUS(1,2,4,3)=TBUS(1,1,4,3)+TBUST

TBUS(2,1,1,1)=-1*TBUSW/2
TBUS(2,1,1,2)=-1*RESINH/2+TBUSDEPTH-TBUSARMW
TBUS(2,1,1,3)=-1*TBUST/2
TBUS(2,1,2,1)=0
TBUS(2,1,2,2)=-1*RESINH/2+TBUSDEPTH-TBUSARMW
TBUS(2,1,2,3)=-1*TBUST/2
TBUS(2,1,3,1)=0
TBUS(2,1,3,2)=-1*RESINH/2+TBUSDEPTH
TBUS(2,1,3,3)=-1*TBUST/2
TBUS(2,1,4,1)=-1*TBUSW/2
TBUS(2,1,4,2)=-1*RESINH/2+TBUSDEPTH
TBUS(2,1,4,3)=-1*TBUST/2
TBUS(2,2,1,1)=TBUS(2,1,1,1)
TBUS(2,2,1,2)=TBUS(2,1,1,2)
TBUS(2,2,1,3)=TBUS(2,1,1,3)+TBUST
TBUS(2,2,2,1)=TBUS(2,1,2,1)
TBUS(2,2,2,2)=TBUS(2,1,2,2)
TBUS(2,2,2,3)=TBUS(2,1,2,3)+TBUST
TBUS(2,2,3,1)=TBUS(2,1,3,1)
TBUS(2,2,3,2)=TBUS(2,1,3,2)
TBUS(2,2,3,3)=TBUS(2,1,3,3)+TBUST
TBUS(2,2,4,1)=TBUS(2,1,4,1)
TBUS(2,2,4,2)=TBUS(2,1,4,2)
TBUS(2,2,4,3)=TBUS(2,1,4,3)+TBUST

TBUS(3,1,1,1)=-1*TBUSW/2-TBUSARM
TBUS(3,1,1,2)=-1*RESINH/2+TBUSDEPTH-TBUSARMW
TBUS(3,1,1,3)=-1*TBUST/2
TBUS(3,1,2,1)=-1*TBUSW/2
TBUS(3,1,2,2)=-1*RESINH/2+TBUSDEPTH-TBUSARMW
TBUS(3,1,2,3)=-1*TBUST/2
TBUS(3,1,3,1)=-1*TBUSW/2
TBUS(3,1,3,2)=-1*RESINH/2+TBUSDEPTH
TBUS(3,1,3,3)=-1*TBUST/2
TBUS(3,1,4,1)=-1*TBUSW/2-TBUSARM
TBUS(3,1,4,2)=-1*RESINH/2+TBUSDEPTH
TBUS(3,1,4,3)=-1*TBUST/2
TBUS(3,2,1,1)=TBUS(3,1,1,1)
TBUS(3,2,1,2)=TBUS(3,1,1,2)
TBUS(3,2,1,3)=TBUS(3,1,1,3)+TBUST
TBUS(3,2,2,1)=TBUS(3,1,2,1)
TBUS(3,2,2,2)=TBUS(3,1,2,2)
TBUS(3,2,2,3)=TBUS(3,1,2,3)+TBUST
TBUS(3,2,3,1)=TBUS(3,1,3,1)
TBUS(3,2,3,2)=TBUS(3,1,3,2)
TBUS(3,2,3,3)=TBUS(3,1,3,3)+TBUST
TBUS(3,2,4,1)=TBUS(3,1,4,1)
TBUS(3,2,4,2)=TBUS(3,1,4,2)
TBUS(3,2,4,3)=TBUS(3,1,4,3)+TBUST

!TBUS周りの樹脂　脇の下1個とその上下サンドイッチ　合計3個
*DIM,RESINTBUS,ARR4,3,2,4,3
RESINTBUS(1,1,1,1)=-1*TBUSW/2-TBUSARM
RESINTBUS(1,1,1,2)=-1*RESINH/2
RESINTBUS(1,1,1,3)=-1*TBUST/2
RESINTBUS(1,1,2,1)=-1*TBUSW/2
RESINTBUS(1,1,2,2)=-1*RESINH/2
RESINTBUS(1,1,2,3)=-1*TBUST/2
RESINTBUS(1,1,3,1)=-1*TBUSW/2
RESINTBUS(1,1,3,2)=-1*RESINH/2+TBUSDEPTH-TBUSARMW
RESINTBUS(1,1,3,3)=-1*TBUST/2
RESINTBUS(1,1,4,1)=-1*TBUSW/2-TBUSARM
RESINTBUS(1,1,4,2)=-1*RESINH/2+TBUSDEPTH-TBUSARMW
RESINTBUS(1,1,4,3)=-1*TBUST/2
RESINTBUS(1,2,1,1)=RESINTBUS(1,1,1,1)
RESINTBUS(1,2,1,2)=RESINTBUS(1,1,1,2)
RESINTBUS(1,2,1,3)=RESINTBUS(1,1,1,3)+TBUST
RESINTBUS(1,2,2,1)=RESINTBUS(1,1,2,1)
RESINTBUS(1,2,2,2)=RESINTBUS(1,1,2,2)
RESINTBUS(1,2,2,3)=RESINTBUS(1,1,2,3)+TBUST
RESINTBUS(1,2,3,1)=RESINTBUS(1,1,3,1)
RESINTBUS(1,2,3,2)=RESINTBUS(1,1,3,2)
RESINTBUS(1,2,3,3)=RESINTBUS(1,1,3,3)+TBUST
RESINTBUS(1,2,4,1)=RESINTBUS(1,1,4,1)
RESINTBUS(1,2,4,2)=RESINTBUS(1,1,4,2)
RESINTBUS(1,2,4,3)=RESINTBUS(1,1,4,3)+TBUST

RESINTBUS(2,1,1,1)=-1*TBUSW/2-TBUSARM
RESINTBUS(2,1,1,2)=-1*RESINH/2
RESINTBUS(2,1,1,3)=TBUST/2
RESINTBUS(2,1,2,1)=0
RESINTBUS(2,1,2,2)=-1*RESINH/2
RESINTBUS(2,1,2,3)=TBUST/2
RESINTBUS(2,1,3,1)=0
RESINTBUS(2,1,3,2)=-1*RESINH/2+TBUSDEPTH
RESINTBUS(2,1,3,3)=TBUST/2
RESINTBUS(2,1,4,1)=-1*TBUSW/2-TBUSARM
RESINTBUS(2,1,4,2)=-1*RESINH/2+TBUSDEPTH
RESINTBUS(2,1,4,3)=TBUST/2
RESINTBUS(2,2,1,1)=RESINTBUS(2,1,1,1)
RESINTBUS(2,2,1,2)=RESINTBUS(2,1,1,2)
RESINTBUS(2,2,1,3)=RESINTBUS(2,1,1,3)+FINERESINT
RESINTBUS(2,2,2,1)=RESINTBUS(2,1,2,1)
RESINTBUS(2,2,2,2)=RESINTBUS(2,1,2,2)
RESINTBUS(2,2,2,3)=RESINTBUS(2,1,2,3)+FINERESINT
RESINTBUS(2,2,3,1)=RESINTBUS(2,1,3,1)
RESINTBUS(2,2,3,2)=RESINTBUS(2,1,3,2)
RESINTBUS(2,2,3,3)=RESINTBUS(2,1,3,3)+FINERESINT
RESINTBUS(2,2,4,1)=RESINTBUS(2,1,4,1)
RESINTBUS(2,2,4,2)=RESINTBUS(2,1,4,2)
RESINTBUS(2,2,4,3)=RESINTBUS(2,1,4,3)+FINERESINT

RESINTBUS(3,1,1,1)=-1*TBUSW/2-TBUSARM
RESINTBUS(3,1,1,2)=-1*RESINH/2
RESINTBUS(3,1,1,3)=-1*TBUST/2-FINERESINT
RESINTBUS(3,1,2,1)=0
RESINTBUS(3,1,2,2)=-1*RESINH/2
RESINTBUS(3,1,2,3)=-1*TBUST/2-FINERESINT
RESINTBUS(3,1,3,1)=0
RESINTBUS(3,1,3,2)=-1*RESINH/2+TBUSDEPTH
RESINTBUS(3,1,3,3)=-1*TBUST/2-FINERESINT
RESINTBUS(3,1,4,1)=-1*TBUSW/2-TBUSARM
RESINTBUS(3,1,4,2)=-1*RESINH/2+TBUSDEPTH
RESINTBUS(3,1,4,3)=-1*TBUST/2-FINERESINT
RESINTBUS(3,2,1,1)=RESINTBUS(3,1,1,1)
RESINTBUS(3,2,1,2)=RESINTBUS(3,1,1,2)
RESINTBUS(3,2,1,3)=RESINTBUS(3,1,1,3)+FINERESINT
RESINTBUS(3,2,2,1)=RESINTBUS(3,1,2,1)
RESINTBUS(3,2,2,2)=RESINTBUS(3,1,2,2)
RESINTBUS(3,2,2,3)=RESINTBUS(3,1,2,3)+FINERESINT
RESINTBUS(3,2,3,1)=RESINTBUS(3,1,3,1)
RESINTBUS(3,2,3,2)=RESINTBUS(3,1,3,2)
RESINTBUS(3,2,3,3)=RESINTBUS(3,1,3,3)+FINERESINT
RESINTBUS(3,2,4,1)=RESINTBUS(3,1,4,1)
RESINTBUS(3,2,4,2)=RESINTBUS(3,1,4,2)
RESINTBUS(3,2,4,3)=RESINTBUS(3,1,4,3)+FINERESINT

!中央部の樹脂　下から3つ　下中上　FINERESIN部の幅の厚みで
*DIM,RESINCENTER,ARR4,3,2,4,3
RESINCENTER(1,1,1,1)=-1*RESINW/2
RESINCENTER(1,1,1,2)=-1*RESINH/2
RESINCENTER(1,1,1,3)=-1*BUST/2-FINERESINT
RESINCENTER(1,1,2,1)=-1*TBUSW/2-TBUSARM
RESINCENTER(1,1,2,2)=-1*RESINH/2
RESINCENTER(1,1,2,3)=-1*BUST/2-FINERESINT
RESINCENTER(1,1,3,1)=-1*TBUSW/2-TBUSARM
RESINCENTER(1,1,3,2)=-1*RESINH/2+TBUSDEPTH
RESINCENTER(1,1,3,3)=-1*BUST/2-FINERESINT
RESINCENTER(1,1,4,1)=-1*RESINW/2
RESINCENTER(1,1,4,2)=-1*RESINH/2+TBUSDEPTH
RESINCENTER(1,1,4,3)=-1*BUST/2-FINERESINT
RESINCENTER(1,2,1,1)=RESINCENTER(1,1,1,1)
RESINCENTER(1,2,1,2)=RESINCENTER(1,1,1,2)
RESINCENTER(1,2,1,3)=BUST/2+FINERESINT
RESINCENTER(1,2,2,1)=RESINCENTER(1,1,2,1)
RESINCENTER(1,2,2,2)=RESINCENTER(1,1,2,2)
RESINCENTER(1,2,2,3)=BUST/2+FINERESINT
RESINCENTER(1,2,3,1)=RESINCENTER(1,1,3,1)
RESINCENTER(1,2,3,2)=RESINCENTER(1,1,3,2)
RESINCENTER(1,2,3,3)=BUST/2+FINERESINT
RESINCENTER(1,2,4,1)=RESINCENTER(1,1,4,1)
RESINCENTER(1,2,4,2)=RESINCENTER(1,1,4,2)
RESINCENTER(1,2,4,3)=BUST/2+FINERESINT

RESINCENTER(2,1,1,1)=-1*RESINW/2
RESINCENTER(2,1,1,2)=-1*RESINH/2+TBUSDEPTH
RESINCENTER(2,1,1,3)=-1*BUST/2-FINERESINT
RESINCENTER(2,1,2,1)=0
RESINCENTER(2,1,2,2)=-1*RESINH/2+TBUSDEPTH
RESINCENTER(2,1,2,3)=-1*BUST/2-FINERESINT
RESINCENTER(2,1,3,1)=0
RESINCENTER(2,1,3,2)=RESINH/2-DEPTH-FINERESINW
RESINCENTER(2,1,3,3)=-1*BUST/2-FINERESINT
RESINCENTER(2,1,4,1)=-1*RESINW/2
RESINCENTER(2,1,4,2)=RESINH/2-DEPTH-FINERESINW
RESINCENTER(2,1,4,3)=-1*BUST/2-FINERESINT
RESINCENTER(2,2,1,1)=RESINCENTER(2,1,1,1)
RESINCENTER(2,2,1,2)=RESINCENTER(2,1,1,2)
RESINCENTER(2,2,1,3)=BUST/2+FINERESINT
RESINCENTER(2,2,2,1)=RESINCENTER(2,1,2,1)
RESINCENTER(2,2,2,2)=RESINCENTER(2,1,2,2)
RESINCENTER(2,2,2,3)=BUST/2+FINERESINT
RESINCENTER(2,2,3,1)=RESINCENTER(2,1,3,1)
RESINCENTER(2,2,3,2)=RESINCENTER(2,1,3,2)
RESINCENTER(2,2,3,3)=BUST/2+FINERESINT
RESINCENTER(2,2,4,1)=RESINCENTER(2,1,4,1)
RESINCENTER(2,2,4,2)=RESINCENTER(2,1,4,2)
RESINCENTER(2,2,4,3)=BUST/2+FINERESINT

RESINCENTER(3,1,1,1)=-1*RESINW/2
RESINCENTER(3,1,1,2)=RESINH/2-DEPTH-FINERESINW
RESINCENTER(3,1,1,3)=-1*BUST/2-FINERESINT
RESINCENTER(3,1,2,1)=-1*BUSW/2-FINERESINW
RESINCENTER(3,1,2,2)=RESINH/2-DEPTH-FINERESINW
RESINCENTER(3,1,2,3)=-1*BUST/2-FINERESINT
RESINCENTER(3,1,3,1)=-1*BUSW/2-FINERESINW
RESINCENTER(3,1,3,2)=RESINH/2
RESINCENTER(3,1,3,3)=-1*BUST/2-FINERESINT
RESINCENTER(3,1,4,1)=-1*RESINW/2
RESINCENTER(3,1,4,2)=RESINH/2
RESINCENTER(3,1,4,3)=-1*BUST/2-FINERESINT
RESINCENTER(3,2,1,1)=RESINCENTER(3,1,1,1)
RESINCENTER(3,2,1,2)=RESINCENTER(3,1,1,2)
RESINCENTER(3,2,1,3)=BUST/2+FINERESINT
RESINCENTER(3,2,2,1)=RESINCENTER(3,1,2,1)
RESINCENTER(3,2,2,2)=RESINCENTER(3,1,2,2)
RESINCENTER(3,2,2,3)=BUST/2+FINERESINT
RESINCENTER(3,2,3,1)=RESINCENTER(3,1,3,1)
RESINCENTER(3,2,3,2)=RESINCENTER(3,1,3,2)
RESINCENTER(3,2,3,3)=BUST/2+FINERESINT
RESINCENTER(3,2,4,1)=RESINCENTER(3,1,4,1)
RESINCENTER(3,2,4,2)=RESINCENTER(3,1,4,2)
RESINCENTER(3,2,4,3)=BUST/2+FINERESINT

!最後にZ軸　上下端の大きな樹脂 下 上の順で2個
*DIM,RESINUPDOWN,ARR4,2,2,4,3
RESINUPDOWN(1,1,1,1)=-1*RESINW/2
RESINUPDOWN(1,1,1,2)=-1*RESINH/2
RESINUPDOWN(1,1,1,3)=-1*RESINT/2
RESINUPDOWN(1,1,2,1)=0
RESINUPDOWN(1,1,2,2)=-1*RESINH/2
RESINUPDOWN(1,1,2,3)=-1*RESINT/2
RESINUPDOWN(1,1,3,1)=0
RESINUPDOWN(1,1,3,2)=RESINH/2
RESINUPDOWN(1,1,3,3)=-1*RESINT/2
RESINUPDOWN(1,1,4,1)=-1*RESINW/2
RESINUPDOWN(1,1,4,2)=RESINH/2
RESINUPDOWN(1,1,4,3)=-1*RESINT/2
RESINUPDOWN(1,2,1,1)=RESINUPDOWN(1,1,1,1)
RESINUPDOWN(1,2,1,2)=RESINUPDOWN(1,1,1,2)
RESINUPDOWN(1,2,1,3)=-1*BUST/2-FINERESINT
RESINUPDOWN(1,2,2,1)=RESINUPDOWN(1,1,2,1)
RESINUPDOWN(1,2,2,2)=RESINUPDOWN(1,1,2,2)
RESINUPDOWN(1,2,2,3)=-1*BUST/2-FINERESINT
RESINUPDOWN(1,2,3,1)=RESINUPDOWN(1,1,3,1)
RESINUPDOWN(1,2,3,2)=RESINUPDOWN(1,1,3,2)
RESINUPDOWN(1,2,3,3)=-1*BUST/2-FINERESINT
RESINUPDOWN(1,2,4,1)=RESINUPDOWN(1,1,4,1)
RESINUPDOWN(1,2,4,2)=RESINUPDOWN(1,1,4,2)
RESINUPDOWN(1,2,4,3)=-1*BUST/2-FINERESINT

RESINUPDOWN(2,1,1,1)=-1*RESINW/2
RESINUPDOWN(2,1,1,2)=-1*RESINH/2
RESINUPDOWN(2,1,1,3)=BUST/2+FINERESINT
RESINUPDOWN(2,1,2,1)=0
RESINUPDOWN(2,1,2,2)=-1*RESINH/2
RESINUPDOWN(2,1,2,3)=BUST/2+FINERESINT
RESINUPDOWN(2,1,3,1)=0
RESINUPDOWN(2,1,3,2)=RESINH/2
RESINUPDOWN(2,1,3,3)=BUST/2+FINERESINT
RESINUPDOWN(2,1,4,1)=-1*RESINW/2
RESINUPDOWN(2,1,4,2)=RESINH/2
RESINUPDOWN(2,1,4,3)=BUST/2+FINERESINT
RESINUPDOWN(2,2,1,1)=RESINUPDOWN(2,1,1,1)
RESINUPDOWN(2,2,1,2)=RESINUPDOWN(2,1,1,2)
RESINUPDOWN(2,2,1,3)=RESINT/2
RESINUPDOWN(2,2,2,1)=RESINUPDOWN(2,1,2,1)
RESINUPDOWN(2,2,2,2)=RESINUPDOWN(2,1,2,2)
RESINUPDOWN(2,2,2,3)=RESINT/2
RESINUPDOWN(2,2,3,1)=RESINUPDOWN(2,1,3,1)
RESINUPDOWN(2,2,3,2)=RESINUPDOWN(2,1,3,2)
RESINUPDOWN(2,2,3,3)=RESINT/2
RESINUPDOWN(2,2,4,1)=RESINUPDOWN(2,1,4,1)
RESINUPDOWN(2,2,4,2)=RESINUPDOWN(2,1,4,2)
RESINUPDOWN(2,2,4,3)=RESINT/2

!ここまででバスと樹脂の座標指定完了


/ang,1					!/ANGLEの略　表示の回転。ここではデフォルトのようだ
/vup,1,z				!参照方向指定。画面1をZ-Y平面で表示　の方向を指示
/view,1,1,1,1				!モデルの参照方向の変更であるとのこと。XV(2つめのPARA)にWPナンバのみを指定するとそのWPに垂直な視点が設定される
/prep7
/pnum,mat,on !ここは要素への材料色の指定
/num,1
/prep7
					!再描画コマンド
!----材料の設定　石塚
!*
MAT,1,
MPREAD,'C:\Users\Documents\ANSYS_CAE\material\SI_UNIT_DATA\SnAgCu','SI_MPL',,LIB
!*
MPLIST,1
TBLIST,ALL,1
!*
MAT,2,
MPREAD,'C:\Users\Documents\ANSYS_CAE\material\SI_UNIT_DATA\SI','SI_MPL',,LIB
!*
MPLIST,2
TBLIST,ALL,2
!*
MAT,3,
MPREAD,'C:\Users\Documents\ANSYS_CAE\material\SI_UNIT_DATA\CU','SI_MPL',,LIB
!*
MPLIST,3
TBLIST,ALL,3
!*
MAT,4,
MPREAD,'C:\Users\Documents\ANSYS_CAE\material\SI_UNIT_DATA\SIN','SI_MPL',,LIB
!*
MAT,5,
MPREAD,'C:\Users\Documents\ANSYS_CAE\material\SI_UNIT_DATA\Al','SI_MPL',,LIB
!*
MAT,6,
MPREAD,'C:\Users\Documents\ANSYS_CAE\material\SI_UNIT_DATA\CuMo','SI_MPL',,LIB
!材料の設定　石塚

MAT,7,
MPREAD,'C:\Users\Documents\ANSYS_CAE\material\SI_UNIT_DATA\RESIN','SI_MPL',,LIB
!材料の設定　石塚


!----------------ここからボリューム作成＆メッシュ切り 2016.6.20 石塚------------------------
et,1,90			!これがTYPE1 に指定するメッシュ要素 ヘキサ　高次	121008 これは伝熱用接点であることが判明
et,1,186			!こちらが、構造用接点
!et,2,200,7		!200はMESH200 OPTIONの7は3次元的なゆがみを許容する四角形面要素　8節点を有する

WPOFFS,0,0,BUSTOP(1,1,3)
PTXY,BUSTOP(1,1,1),BUSTOP(1,1,2),BUSTOP(1,2,1),BUSTOP(1,2,2),BUSTOP(1,3,1),BUSTOP(1,3,2)
!POLY
WPOFFS,0,0,-1*BUSTOP(1,1,3)

PRISM,BUSTOP(1,1,3),BUSTOP(2,1,3)

mat,3	!これを追加
type,1			!要素タイプを選択
mshap,0,3d		!0:6面体　3Dはボリュームに対するメッシュの意味
mshk,1			!MSHKEYの略　1はMAPEDメッシュのこと

DX=(NINT((BUSTOP(1,2,1)-BUSTOP(1,3,1))/M_SOLX))+MOD((NINT((BUSTOP(1,2,1)-BUSTOP(1,3,1))/M_SOLX)),2)
DY=DX
DZ=(NINT((BUSTOP(2,1,3)-BUSTOP(1,1,3))/M_SOLZ))

lsel,s,,,1,3,1	!ライン番号
lesiz,all,,,DX	!分割
ALLSEL
lsel,s,,,7	!ライン番号
!lesiz,all,,,DZ	!分割
lesiz,all,,,2	!分割
ALLSEL
VMESH,1

K,7,BUS2ND(1,3,1),BUS2ND(1,3,2),BUS2ND(1,3,3)
K,8,BUS2ND(1,4,1),BUS2ND(1,4,2),BUS2ND(1,4,3)
K,9,BUS2ND(2,3,1),BUS2ND(2,3,2),BUS2ND(2,3,3)
K,10,BUS2ND(2,4,1),BUS2ND(2,4,2),BUS2ND(2,4,3)

V,3,2,5,6,10,9,7,8

mat,3	!これを追加
type,1			!要素タイプを選択
mshap,0,3d		!0:6面体　3Dはボリュームに対するメッシュの意味
mshk,1			!MSHKEYの略　1はMAPEDメッシュのこと

DY=(NINT((BUS2ND(1,3,2)-BUS2ND(1,2,2))/M_SOLY))+MOD((NINT((BUS2ND(1,3,2)-BUS2ND(1,2,2))/M_SOLY)),2)
DX=(NINT((BUS2ND(1,2,1)-BUS2ND(1,1,1))/BUSX))+MOD((NINT((BUS2ND(1,2,1)-BUS2ND(1,1,1))/BUSX)),2)
DZ=(NINT((BUS2ND(2,1,3)-BUS2ND(1,1,3))/BUSZ))+MOD((NINT((BUS2ND(2,1,3)-BUS2ND(1,1,3))/BUSZ)),2)

lsel,s,,,10	!ライン番号
lesiz,all,,,DY	!分割
ALLSEL
!lsel,s,,,11,15,4	!ライン番号
!lesiz,all,,,DX	!分割
!ALLSEL
!lsel,s,,,13,17,4	!ライン番号
!lesiz,all,,,DZ	!分割
!ALLSEL

VMESH,2


K,11,BUS3RD(1,1,1),BUS3RD(1,1,2),BUS3RD(1,1,3)
K,12,BUS3RD(1,2,1),BUS3RD(1,2,2),BUS3RD(1,2,3)
K,13,BUS3RD(1,3,1),BUS3RD(1,3,2),BUS3RD(1,3,3)
K,14,BUS3RD(1,4,1),BUS3RD(1,4,2),BUS3RD(1,4,3)
K,15,BUS3RD(2,1,1),BUS3RD(2,1,2),BUS3RD(2,1,3)
K,16,BUS3RD(2,2,1),BUS3RD(2,2,2),BUS3RD(2,2,3)
K,17,BUS3RD(2,3,1),BUS3RD(2,3,2),BUS3RD(2,3,3)
K,18,BUS3RD(2,4,1),BUS3RD(2,4,2),BUS3RD(2,4,3)

V,11,12,13,14,15,16,17,18
mat,3	!これを追加
type,1			!要素タイプを選択
mshap,0,3d		!0:6面体　3Dはボリュームに対するメッシュの意味
mshk,1			!MSHKEYの略　1はMAPEDメッシュのこと

DY=(NINT((BUS3RD(1,3,2)-BUS3RD(1,2,2))/BUSY))+MOD((NINT((BUS3RD(1,3,2)-BUS3RD(1,2,2))/BUSY)),2)
DX=(NINT((BUS3RD(1,2,1)-BUS3RD(1,1,1))/BUSX))+MOD((NINT((BUS3RD(1,2,1)-BUS3RD(1,1,1))/BUSX)),2)
DZ=(NINT((BUS3RD(2,1,3)-BUS3RD(1,1,3))/BUSZ))+MOD((NINT((BUS3RD(2,1,3)-BUS3RD(1,1,3))/BUSZ)),2)

lsel,s,,,18	!ライン番号
lesiz,all,,,DX	!分割
ALLSEL

lsel,s,,,19	!ライン番号
lesiz,all,,,DY	!分割
ALLSEL

lsel,s,,,22	!ライン番号
lesiz,all,,,DZ	!分割
ALLSEL

VMESH,3
!----------------上側のバス完了
!----------------ここからバス周りの細かい樹脂
!三角部
WPOFFS,0,0,FINERESINTRI(1,1,3)
PTXY,FINERESINTRI(1,1,1),FINERESINTRI(1,1,2),FINERESINTRI(1,2,1),FINERESINTRI(1,2,2),FINERESINTRI(1,3,1),FINERESINTRI(1,3,2)
!POLY
WPOFFS,0,0,-1*FINERESINTRI(1,1,3)

PRISM,FINERESINTRI(1,1,3),FINERESINTRI(2,1,3)

mat,7	!これを追加
type,1			!要素タイプを選択
mshap,0,3d		!0:6面体　3Dはボリュームに対するメッシュの意味
mshk,1			!MSHKEYの略　1はMAPEDメッシュのこと

DX=(NINT((FINERESINTRI(1,2,1)-FINERESINTRI(1,3,1))/M_SOLX))+MOD((NINT((FINERESINTRI(1,2,1)-FINERESINTRI(1,3,1))/M_SOLX)),2)
DY=DX
!DZ=(NINT((FINERESINTRI(2,1,3)-FINERESINTRI(1,1,3))/M_SOLZ))
DZ=2

lsel,s,,,30,32,1	!ライン番号
lesiz,all,,,DX	!分割
ALLSEL
lsel,s,,,36	!ライン番号
lesiz,all,,,DZ	!分割
ALLSEL
VMESH,4
!三角の下
K,25,FINERESIN(1,1,1,1),FINERESIN(1,1,1,2),FINERESIN(1,1,1,3)
K,26,FINERESIN(1,1,2,1),FINERESIN(1,1,2,2),FINERESIN(1,1,2,3)
K,27,FINERESIN(1,2,1,1),FINERESIN(1,2,1,2),FINERESIN(1,2,1,3)
K,28,FINERESIN(1,2,2,1),FINERESIN(1,2,2,2),FINERESIN(1,2,2,3)

V,25,26,23,22,27,28,20,19
mat,7	!これを追加
type,1			!要素タイプを選択
mshap,0,3d		!0:6面体　3Dはボリュームに対するメッシュの意味
mshk,1			!MSHKEYの略　1はMAPEDメッシュのこと

DY=(NINT((FINERESIN(1,1,3,2)-FINERESIN(1,1,2,2))/M_SOLY))+MOD((NINT((FINERESIN(1,1,3,2)-FINERESIN(1,1,2,2))/M_SOLY)),2)
lsel,s,,,40	!ライン番号
lesiz,all,,,DY	!分割
ALLSEL
VMESH,5

K,29,FINERESIN(2,1,1,1),FINERESIN(2,1,1,2),FINERESIN(2,1,1,3)
K,30,FINERESIN(2,1,4,1),FINERESIN(2,1,4,2),FINERESIN(2,1,4,3)
K,31,FINERESIN(2,2,1,1),FINERESIN(2,2,1,2),FINERESIN(2,2,1,3)
K,32,FINERESIN(2,2,4,1),FINERESIN(2,2,4,2),FINERESIN(2,2,4,3)

V,29,25,22,30,31,27,19,32

mat,7	!これを追加
type,1			!要素タイプを選択
mshap,0,3d		!0:6面体　3Dはボリュームに対するメッシュの意味
mshk,1			!MSHKEYの略　1はMAPEDメッシュのこと

DX=(NINT((FINERESIN(2,1,2,1)-FINERESIN(2,1,1,1))/M_SOLX))+MOD((NINT((FINERESIN(2,1,2,1)-FINERESIN(2,1,1,1))/M_SOLX)),2)
lsel,s,,,47	!ライン番号
lesiz,all,,,DX	!分割
ALLSEL
VMESH,6


K,33,FINERESIN(3,1,4,1),FINERESIN(3,1,4,2),FINERESIN(3,1,4,3)
K,34,FINERESIN(3,2,4,1),FINERESIN(3,2,4,2),FINERESIN(3,2,4,3)

V,30,22,24,33,32,19,21,34

mat,7	!これを追加
type,1			!要素タイプを選択
mshap,0,3d		!0:6面体　3Dはボリュームに対するメッシュの意味
mshk,1			!MSHKEYの略　1はMAPEDメッシュのこと

VMESH,7

!上下のFINE樹脂
K,35,FINERESIN(4,1,1,1),FINERESIN(4,1,1,2),FINERESIN(4,1,1,3)
K,36,FINERESIN(4,1,2,1),FINERESIN(4,1,2,2),FINERESIN(4,1,2,3)
K,37,FINERESIN(4,1,3,1),FINERESIN(4,1,3,2),FINERESIN(4,1,3,3)
K,38,FINERESIN(4,1,4,1),FINERESIN(4,1,4,2),FINERESIN(4,1,4,3)
K,39,FINERESIN(4,2,1,1),FINERESIN(4,2,1,2),FINERESIN(4,2,1,3)
K,40,FINERESIN(4,2,2,1),FINERESIN(4,2,2,2),FINERESIN(4,2,2,3)
K,41,FINERESIN(4,2,3,1),FINERESIN(4,2,3,2),FINERESIN(4,2,3,3)
K,42,FINERESIN(4,2,4,1),FINERESIN(4,2,4,2),FINERESIN(4,2,4,3)

V,35,36,37,38,39,40,41,42

mat,7	!これを追加
type,1			!要素タイプを選択
mshap,0,3d		!0:6面体　3Dはボリュームに対するメッシュの意味
mshk,1			!MSHKEYの略　1はMAPEDメッシュのこと

DX=(NINT((FINERESIN(4,1,2,1)-FINERESIN(4,1,1,1))/M_SOLX))+MOD((NINT((FINERESIN(4,1,2,1)-FINERESIN(4,1,1,1))/M_SOLX)),2)
DY=(NINT((FINERESIN(4,1,3,2)-FINERESIN(4,1,2,2))/M_SOLY))+MOD((NINT((FINERESIN(4,1,3,2)-FINERESIN(4,1,2,2))/M_SOLY)),2)
DZ=(NINT((FINERESIN(4,2,1,3)-FINERESIN(4,1,1,3))/M_SOLZ))+MOD((NINT((FINERESIN(4,2,1,3)-FINERESIN(4,1,1,3))/M_SOLZ)),2)
lsel,s,,,60	!ライン番号
lesiz,all,,,DX	!分割
ALLSEL
lsel,s,,,61	!ライン番号
lesiz,all,,,DY	!分割
ALLSEL
lsel,s,,,64	!ライン番号
lesiz,all,,,DZ	!分割
ALLSEL

VMESH,8


K,43,FINERESIN(5,1,1,1),FINERESIN(5,1,1,2),FINERESIN(5,1,1,3)
K,44,FINERESIN(5,1,2,1),FINERESIN(5,1,2,2),FINERESIN(5,1,2,3)
K,45,FINERESIN(5,1,3,1),FINERESIN(5,1,3,2),FINERESIN(5,1,3,3)
K,46,FINERESIN(5,1,4,1),FINERESIN(5,1,4,2),FINERESIN(5,1,4,3)
K,47,FINERESIN(5,2,1,1),FINERESIN(5,2,1,2),FINERESIN(5,2,1,3)
K,48,FINERESIN(5,2,2,1),FINERESIN(5,2,2,2),FINERESIN(5,2,2,3)
K,49,FINERESIN(5,2,3,1),FINERESIN(5,2,3,2),FINERESIN(5,2,3,3)
K,50,FINERESIN(5,2,4,1),FINERESIN(5,2,4,2),FINERESIN(5,2,4,3)

V,43,44,45,46,47,48,49,50

mat,7	!これを追加
type,1			!要素タイプを選択
mshap,0,3d		!0:6面体　3Dはボリュームに対するメッシュの意味
mshk,1			!MSHKEYの略　1はMAPEDメッシュのこと

DX=(NINT((FINERESIN(5,1,2,1)-FINERESIN(5,1,1,1))/M_SOLX))+MOD((NINT((FINERESIN(5,1,2,1)-FINERESIN(5,1,1,1))/M_SOLX)),2)
DY=(NINT((FINERESIN(5,1,3,2)-FINERESIN(5,1,2,2))/M_SOLY))+MOD((NINT((FINERESIN(5,1,3,2)-FINERESIN(5,1,2,2))/M_SOLY)),2)
DZ=(NINT((FINERESIN(5,2,1,3)-FINERESIN(5,1,1,3))/M_SOLZ))+MOD((NINT((FINERESIN(5,2,1,3)-FINERESIN(5,1,1,3))/M_SOLZ)),2)
lsel,s,,,72	!ライン番号
lesiz,all,,,DX	!分割
ALLSEL
lsel,s,,,73	!ライン番号
lesiz,all,,,DY	!分割
ALLSEL
lsel,s,,,76	!ライン番号
lesiz,all,,,DZ	!分割
ALLSEL

VMESH,9

!--------------下側Tの字BUS
K,51,TBUS(1,1,1,1),TBUS(1,1,1,2),TBUS(1,1,1,3)
K,52,TBUS(1,1,2,1),TBUS(1,1,2,2),TBUS(1,1,2,3)
K,53,TBUS(1,1,3,1),TBUS(1,1,3,2),TBUS(1,1,3,3)
K,54,TBUS(1,1,4,1),TBUS(1,1,4,2),TBUS(1,1,4,3)
K,55,TBUS(1,2,1,1),TBUS(1,2,1,2),TBUS(1,2,1,3)
K,56,TBUS(1,2,2,1),TBUS(1,2,2,2),TBUS(1,2,2,3)
K,57,TBUS(1,2,3,1),TBUS(1,2,3,2),TBUS(1,2,3,3)
K,58,TBUS(1,2,4,1),TBUS(1,2,4,2),TBUS(1,2,4,3)

V,51,52,53,54,55,56,57,58

mat,3	!これを追加
type,1			!要素タイプを選択
mshap,0,3d		!0:6面体　3Dはボリュームに対するメッシュの意味
mshk,1			!MSHKEYの略　1はMAPEDメッシュのこと

DX=(NINT((TBUS(1,1,2,1)-TBUS(1,1,1,1))/BUSX))+MOD((NINT((TBUS(1,1,2,1)-TBUS(1,1,1,1))/BUSX)),2)
DY=(NINT((TBUS(1,1,3,2)-TBUS(1,1,2,2))/BUSY))+MOD((NINT((TBUS(1,1,3,2)-TBUS(1,1,2,2))/BUSY)),2)
DZ=(NINT((TBUS(1,2,1,3)-TBUS(1,1,1,3))/BUSZ))+MOD((NINT((TBUS(1,2,1,3)-TBUS(1,1,1,3))/BUSZ)),2)

lsel,s,,,84	!ライン番号
lesiz,all,,,DX	!分割
ALLSEL
lsel,s,,,85	!ライン番号
lesiz,all,,,DY	!分割
ALLSEL
lsel,s,,,88	!ライン番号
lesiz,all,,,DZ	!分割
ALLSEL

VMESH,10


K,59,TBUS(2,1,3,1),TBUS(2,1,3,2),TBUS(2,1,3,3)
K,60,TBUS(2,1,4,1),TBUS(2,1,4,2),TBUS(2,1,4,3)
K,61,TBUS(2,2,3,1),TBUS(2,2,3,2),TBUS(2,2,3,3)
K,62,TBUS(2,2,4,1),TBUS(2,2,4,2),TBUS(2,2,4,3)

V,54,53,59,60,58,57,61,62

mat,3	!これを追加
type,1			!要素タイプを選択
mshap,0,3d		!0:6面体　3Dはボリュームに対するメッシュの意味
mshk,1			!MSHKEYの略　1はMAPEDメッシュのこと

DX=(NINT((TBUS(2,1,2,1)-TBUS(2,1,1,1))/BUSX))+MOD((NINT((TBUS(2,1,2,1)-TBUS(2,1,1,1))/BUSX)),2)
DY=(NINT((TBUS(2,1,3,2)-TBUS(2,1,2,2))/BUSY))+MOD((NINT((TBUS(2,1,3,2)-TBUS(2,1,2,2))/BUSY)),2)
DZ=(NINT((TBUS(2,2,1,3)-TBUS(2,1,1,3))/BUSZ))+MOD((NINT((TBUS(2,2,1,3)-TBUS(2,1,1,3))/BUSZ)),2)

lsel,s,,,96	!ライン番号
lesiz,all,,,DY	!分割
ALLSEL

VMESH,11


K,63,TBUS(3,1,1,1),TBUS(3,1,1,2),TBUS(3,1,1,3)
K,64,TBUS(3,1,4,1),TBUS(3,1,4,2),TBUS(3,1,4,3)
K,65,TBUS(3,2,1,1),TBUS(3,2,1,2),TBUS(3,2,1,3)
K,66,TBUS(3,2,4,1),TBUS(3,2,4,2),TBUS(3,2,4,3)

V,63,54,60,64,65,58,62,66

mat,3	!これを追加
type,1			!要素タイプを選択
mshap,0,3d		!0:6面体　3Dはボリュームに対するメッシュの意味
mshk,1			!MSHKEYの略　1はMAPEDメッシュのこと

DX=(NINT((TBUS(3,1,2,1)-TBUS(3,1,1,1))/BUSX))+MOD((NINT((TBUS(3,1,2,1)-TBUS(3,1,1,1))/BUSX)),2)
DY=(NINT((TBUS(3,1,3,2)-TBUS(3,1,2,2))/BUSY))+MOD((NINT((TBUS(3,1,3,2)-TBUS(3,1,2,2))/BUSY)),2)
DZ=(NINT((TBUS(3,2,1,3)-TBUS(3,1,1,3))/BUSZ))+MOD((NINT((TBUS(3,2,1,3)-TBUS(3,1,1,3))/BUSZ)),2)

lsel,s,,,104	!ライン番号
lesiz,all,,,DX	!分割
ALLSEL

VMESH,12

!Tの字バス完成
!Tの字バス周りの樹脂
K,67,RESINTBUS(1,1,1,1),RESINTBUS(1,1,1,2),RESINTBUS(1,1,1,3)
K,68,RESINTBUS(1,1,2,1),RESINTBUS(1,1,2,2),RESINTBUS(1,1,2,3)
K,69,RESINTBUS(1,1,3,1),RESINTBUS(1,1,3,2),RESINTBUS(1,1,3,3)
K,70,RESINTBUS(1,1,4,1),RESINTBUS(1,1,4,2),RESINTBUS(1,1,4,3)
K,71,RESINTBUS(1,2,1,1),RESINTBUS(1,2,1,2),RESINTBUS(1,2,1,3)
K,72,RESINTBUS(1,2,2,1),RESINTBUS(1,2,2,2),RESINTBUS(1,2,2,3)
K,73,RESINTBUS(1,2,3,1),RESINTBUS(1,2,3,2),RESINTBUS(1,2,3,3)
K,74,RESINTBUS(1,2,4,1),RESINTBUS(1,2,4,2),RESINTBUS(1,2,4,3)

V,67,68,69,70,71,72,73,74

mat,7	!これを追加
type,1			!要素タイプを選択
mshap,0,3d		!0:6面体　3Dはボリュームに対するメッシュの意味
mshk,1			!MSHKEYの略　1はMAPEDメッシュのこと

DX=(NINT((RESINTBUS(1,1,2,1)-RESINTBUS(1,1,1,1))/BUSX))+MOD((NINT((RESINTBUS(1,1,2,1)-RESINTBUS(1,1,1,1))/BUSX)),2)
DY=(NINT((RESINTBUS(1,1,3,2)-RESINTBUS(1,1,2,2))/BUSY))+MOD((NINT((RESINTBUS(1,1,3,2)-RESINTBUS(1,1,2,2))/BUSY)),2)
DZ=(NINT((RESINTBUS(1,2,1,3)-RESINTBUS(1,1,1,3))/BUSZ))+MOD((NINT((RESINTBUS(1,2,1,3)-RESINTBUS(1,1,1,3))/BUSZ)),2)

lsel,s,,,112	!ライン番号
lesiz,all,,,DX	!分割
ALLSEL
lsel,s,,,113	!ライン番号
lesiz,all,,,DY	!分割
ALLSEL
lsel,s,,,116	!ライン番号
lesiz,all,,,DZ	!分割
ALLSEL

VMESH,13


K,75,RESINTBUS(2,1,1,1),RESINTBUS(2,1,1,2),RESINTBUS(2,1,1,3)
K,76,RESINTBUS(2,1,2,1),RESINTBUS(2,1,2,2),RESINTBUS(2,1,2,3)
K,77,RESINTBUS(2,1,3,1),RESINTBUS(2,1,3,2),RESINTBUS(2,1,3,3)
K,78,RESINTBUS(2,1,4,1),RESINTBUS(2,1,4,2),RESINTBUS(2,1,4,3)
K,79,RESINTBUS(2,2,1,1),RESINTBUS(2,2,1,2),RESINTBUS(2,2,1,3)
K,80,RESINTBUS(2,2,2,1),RESINTBUS(2,2,2,2),RESINTBUS(2,2,2,3)
K,81,RESINTBUS(2,2,3,1),RESINTBUS(2,2,3,2),RESINTBUS(2,2,3,3)
K,82,RESINTBUS(2,2,4,1),RESINTBUS(2,2,4,2),RESINTBUS(2,2,4,3)

V,75,76,77,78,79,80,81,82

mat,7	!これを追加
type,1			!要素タイプを選択
mshap,0,3d		!0:6面体　3Dはボリュームに対するメッシュの意味
mshk,1			!MSHKEYの略　1はMAPEDメッシュのこと

DX=(NINT((RESINTBUS(2,1,2,1)-RESINTBUS(2,1,1,1))/BUSX))+MOD((NINT((RESINTBUS(2,1,2,1)-RESINTBUS(2,1,1,1))/BUSX)),2)
DY=(NINT((RESINTBUS(2,1,3,2)-RESINTBUS(2,1,2,2))/BUSY))+MOD((NINT((RESINTBUS(2,1,3,2)-RESINTBUS(2,1,2,2))/BUSY)),2)
DZ=(NINT((RESINTBUS(2,2,1,3)-RESINTBUS(2,1,1,3))/BUSZ))+MOD((NINT((RESINTBUS(2,2,1,3)-RESINTBUS(2,1,1,3))/BUSZ)),2)

lsel,s,,,124	!ライン番号
lesiz,all,,,DX	!分割
ALLSEL
lsel,s,,,125	!ライン番号
lesiz,all,,,DY	!分割
ALLSEL
lsel,s,,,128	!ライン番号
lesiz,all,,,DZ	!分割
ALLSEL

VMESH,14


K,83,RESINTBUS(3,1,1,1),RESINTBUS(3,1,1,2),RESINTBUS(3,1,1,3)
K,84,RESINTBUS(3,1,2,1),RESINTBUS(3,1,2,2),RESINTBUS(3,1,2,3)
K,85,RESINTBUS(3,1,3,1),RESINTBUS(3,1,3,2),RESINTBUS(3,1,3,3)
K,86,RESINTBUS(3,1,4,1),RESINTBUS(3,1,4,2),RESINTBUS(3,1,4,3)
K,87,RESINTBUS(3,2,1,1),RESINTBUS(3,2,1,2),RESINTBUS(3,2,1,3)
K,88,RESINTBUS(3,2,2,1),RESINTBUS(3,2,2,2),RESINTBUS(3,2,2,3)
K,89,RESINTBUS(3,2,3,1),RESINTBUS(3,2,3,2),RESINTBUS(3,2,3,3)
K,90,RESINTBUS(3,2,4,1),RESINTBUS(3,2,4,2),RESINTBUS(3,2,4,3)

V,83,84,85,86,87,88,89,90

mat,7	!これを追加
type,1			!要素タイプを選択
mshap,0,3d		!0:6面体　3Dはボリュームに対するメッシュの意味
mshk,1			!MSHKEYの略　1はMAPEDメッシュのこと

DX=(NINT((RESINTBUS(3,1,2,1)-RESINTBUS(3,1,1,1))/BUSX))+MOD((NINT((RESINTBUS(3,1,2,1)-RESINTBUS(3,1,1,1))/BUSX)),2)
DY=(NINT((RESINTBUS(3,1,3,2)-RESINTBUS(3,1,2,2))/BUSY))+MOD((NINT((RESINTBUS(3,1,3,2)-RESINTBUS(3,1,2,2))/BUSY)),2)
DZ=(NINT((RESINTBUS(3,2,1,3)-RESINTBUS(3,1,1,3))/BUSZ))+MOD((NINT((RESINTBUS(3,2,1,3)-RESINTBUS(3,1,1,3))/BUSZ)),2)

lsel,s,,,136	!ライン番号
lesiz,all,,,DX	!分割
ALLSEL
lsel,s,,,137	!ライン番号
lesiz,all,,,DY	!分割
ALLSEL
lsel,s,,,140	!ライン番号
lesiz,all,,,DZ	!分割
ALLSEL

VMESH,15


!中央の樹脂　下中上
*DO,ii,1,3,1
K,83+ii*8,RESINCENTER(ii,1,1,1),RESINCENTER(ii,1,1,2),RESINCENTER(ii,1,1,3)
K,84+ii*8,RESINCENTER(ii,1,2,1),RESINCENTER(ii,1,2,2),RESINCENTER(ii,1,2,3)
K,85+ii*8,RESINCENTER(ii,1,3,1),RESINCENTER(ii,1,3,2),RESINCENTER(ii,1,3,3)
K,86+ii*8,RESINCENTER(ii,1,4,1),RESINCENTER(ii,1,4,2),RESINCENTER(ii,1,4,3)
K,87+ii*8,RESINCENTER(ii,2,1,1),RESINCENTER(ii,2,1,2),RESINCENTER(ii,2,1,3)
K,88+ii*8,RESINCENTER(ii,2,2,1),RESINCENTER(ii,2,2,2),RESINCENTER(ii,2,2,3)
K,89+ii*8,RESINCENTER(ii,2,3,1),RESINCENTER(ii,2,3,2),RESINCENTER(ii,2,3,3)
K,90+ii*8,RESINCENTER(ii,2,4,1),RESINCENTER(ii,2,4,2),RESINCENTER(ii,2,4,3)

V,83+ii*8,84+ii*8,85+ii*8,86+ii*8,87+ii*8,88+ii*8,89+ii*8,90+ii*8

mat,7	!これを追加
type,1			!要素タイプを選択
mshap,0,3d		!0:6面体　3Dはボリュームに対するメッシュの意味
mshk,1			!MSHKEYの略　1はMAPEDメッシュのこと

DX=(NINT((RESINCENTER(ii,1,2,1)-RESINCENTER(ii,1,1,1))/BUSX))+MOD((NINT((RESINCENTER(ii,1,2,1)-RESINCENTER(ii,1,1,1))/BUSX)),2)
DY=(NINT((RESINCENTER(ii,1,3,2)-RESINCENTER(ii,1,2,2))/BUSY))+MOD((NINT((RESINCENTER(ii,1,3,2)-RESINCENTER(ii,1,2,2))/BUSY)),2)
DZ=(NINT((RESINCENTER(ii,2,1,3)-RESINCENTER(ii,1,1,3))/BUSZ))+MOD((NINT((RESINCENTER(ii,2,1,3)-RESINCENTER(ii,1,1,3))/BUSZ)),2)

lsel,s,,,136+ii*12	!ライン番号
lesiz,all,,,DX	!分割
ALLSEL
lsel,s,,,137+ii*12	!ライン番号
lesiz,all,,,DY	!分割
ALLSEL
lsel,s,,,140+ii*12	!ライン番号
lesiz,all,,,DZ	!分割
ALLSEL

VMESH,15+ii
*ENDDO

!上下の大きい樹脂
*DO,ii,1,2,1
K,107+ii*8,RESINUPDOWN(ii,1,1,1),RESINUPDOWN(ii,1,1,2),RESINUPDOWN(ii,1,1,3)
K,108+ii*8,RESINUPDOWN(ii,1,2,1),RESINUPDOWN(ii,1,2,2),RESINUPDOWN(ii,1,2,3)
K,109+ii*8,RESINUPDOWN(ii,1,3,1),RESINUPDOWN(ii,1,3,2),RESINUPDOWN(ii,1,3,3)
K,110+ii*8,RESINUPDOWN(ii,1,4,1),RESINUPDOWN(ii,1,4,2),RESINUPDOWN(ii,1,4,3)
K,111+ii*8,RESINUPDOWN(ii,2,1,1),RESINUPDOWN(ii,2,1,2),RESINUPDOWN(ii,2,1,3)
K,112+ii*8,RESINUPDOWN(ii,2,2,1),RESINUPDOWN(ii,2,2,2),RESINUPDOWN(ii,2,2,3)
K,113+ii*8,RESINUPDOWN(ii,2,3,1),RESINUPDOWN(ii,2,3,2),RESINUPDOWN(ii,2,3,3)
K,114+ii*8,RESINUPDOWN(ii,2,4,1),RESINUPDOWN(ii,2,4,2),RESINUPDOWN(ii,2,4,3)

V,107+ii*8,108+ii*8,109+ii*8,110+ii*8,111+ii*8,112+ii*8,113+ii*8,114+ii*8

mat,7	!これを追加
type,1			!要素タイプを選択
mshap,0,3d		!0:6面体　3Dはボリュームに対するメッシュの意味
mshk,1			!MSHKEYの略　1はMAPEDメッシュのこと

DX=(NINT((RESINUPDOWN(ii,1,2,1)-RESINUPDOWN(ii,1,1,1))/BUSX))+MOD((NINT((RESINUPDOWN(ii,1,2,1)-RESINUPDOWN(ii,1,1,1))/BUSX)),2)
DY=(NINT((RESINUPDOWN(ii,1,3,2)-RESINUPDOWN(ii,1,2,2))/BUSY))+MOD((NINT((RESINUPDOWN(ii,1,3,2)-RESINUPDOWN(ii,1,2,2))/BUSY)),2)
DZ=(NINT((RESINUPDOWN(ii,2,1,3)-RESINUPDOWN(ii,1,1,3))/BUSZ))+MOD((NINT((RESINUPDOWN(ii,2,1,3)-RESINUPDOWN(ii,1,1,3))/BUSZ)),2)

lsel,s,,,172+ii*12	!ライン番号
lesiz,all,,,DX	!分割
ALLSEL
lsel,s,,,173+ii*12	!ライン番号
lesiz,all,,,DY	!分割
ALLSEL
lsel,s,,,176+ii*12	!ライン番号
lesiz,all,,,DZ	!分割
ALLSEL

VMESH,18+ii
*ENDDO


!--------要素ナンバー3と4～8の定義　最初だけでよい
et,3,targe170	!要素ナンバー3をTARGE170に

et,4,conta174	!要素ナンバー4をCONTA174に はんだと銅板 これだけ別の接合キーをつかっている。面圧は評価しない
!keyopt,4,1,2	!こうぞうの場合は0を指定
keyopt,4,4,2	!4,2→4,1に変更
keyopt,4,2,2	!ここで4はCONTA174のこと　これのKEYOPT(2)を2に指定している 多点拘束 MPC
keyopt,4,10,2
!次の行は固着の指定
keyopt,4,1,0	!こうぞうの場合は0を指定
!keyopt,4,2,0	!ここで4はCONTA174のこと　これのKEYOPT(2)を0に指定している	拡大ラグランジェ
keyopt,4,12,5

et,5,conta174	!要素ナンバー5をCONTA174に これは、接合面を評価しない接触要素に割り振る
!keyopt,5,1,2	!こうぞうの場合は0を指定
keyopt,5,4,2	!
keyopt,5,1,0	!こうぞうの場合は0を指定
!keyopt,5,2,0	!ここで4はCONTA174のこと　これのKEYOPT(2)を0に指定している	拡大ラグランジェ
keyopt,5,2,2
keyopt,5,10,2	!
keyopt,5,12,5	!この行は固着の指定

et,6,conta174	!要素ナンバー6をCONTA174に はんだと樹脂の接合面
!keyopt,6,1,2	!こうぞうの場合は0を指定
keyopt,6,4,2	!
!keyopt,6,2,0	!ここで4はCONTA174のこと　これのKEYOPT(2)を0に指定している
!keyopt,6,1,0	!こうぞうの場合は0を指定
keyopt,6,2,2
keyopt,6,10,2	!
keyopt,6,12,5	!この行は固着の指定

et,7,conta174	!要素ナンバー7をCONTA174に Siと樹脂の接合面
!keyopt,7,1,2	!こうぞうの場合は0を指定
keyopt,7,4,2	!
!keyopt,7,2,0	!ここで4はCONTA174のこと　これのKEYOPT(2)を0に指定している
keyopt,7,1,0	!こうぞうの場合は0を指定
keyopt,7,2,2
keyopt,7,10,2	!
keyopt,7,12,5	!この行は固着の指定


et,8,conta174	!要素ナンバー8をCONTA174に 銅板と樹脂の接合面
keyopt,8,1,0	!こうぞうの場合は0を指定
keyopt,8,4,2	!
keyopt,8,2,0	!ここで4はCONTA174のこと　これのKEYOPT(2)を0に指定している
!keyopt,8,2,2
keyopt,8,10,2	!
keyopt,8,12,5	!この行は固着の指定
!-------要素ナンバーの定義　ここまで
!この解析では、5(評価しない接触)と8(銅と樹脂)しか用いない


allsel
!Create Contact Pair
asel,s,,,10	!最初は細かいバスの上面
cm,a_cont,area	!a_contという名をつける
asel,s,,,12	!粗いバスの下面を選択
cm,a_targ,area	!a_targという名をつける  TARGがくっつける相手の（通常大きいほうの）面
allsel
r,10
rmodif,10,14,1e6		!14は接触コンダクタンスのこと CONTA174の リアルコンスタントのことらしい
real,10
type,3		!要素ナンバー3のこと 3ということはtarge170
cmsel,s,a_targ	!Cuの表面選択
nsla,s,1	!選択されたエリアに関する節点の選択
esurf		!既存の要素の自由表面に重ねて要素を生成とのこと
type,5		!評価しない接合面
cmsel,s,a_cont	!はんだ下面の選択
nsla,s,1	!選択されたエリアに関する節点の選択
esurf
allsel

!---------今回の評価面　A1,2,5の面
allsel
!Create Contact Pair
asel,s,,,5	!斜めの面
cm,a_cont,area	!a_contという名をつける
asel,s,,,20	!
cm,a_targ,area	!a_targという名をつける  TARGがくっつける相手の（通常大きいほうの）面
allsel
r,11
rmodif,11,14,1e6		!14は接触コンダクタンスのこと CONTA174の リアルコンスタントのことらしい
real,11
type,3		!要素ナンバー3のこと 3ということはtarge170
cmsel,s,a_targ	!Cuの表面選択
nsla,s,1	!選択されたエリアに関する節点の選択
esurf		!既存の要素の自由表面に重ねて要素を生成とのこと
type,8		!評価しない接合面に変更
cmsel,s,a_cont	!はんだ下面の選択
nsla,s,1	!選択されたエリアに関する節点の選択
esurf
allsel

allsel
!Create Contact Pair
asel,s,,,1	!
cm,a_cont,area	!a_contという名をつける
asel,s,,,36	!
cm,a_targ,area	!a_targという名をつける  TARGがくっつける相手の（通常大きいほうの）面
allsel
r,12
rmodif,12,14,1e6		!14は接触コンダクタンスのこと CONTA174の リアルコンスタントのことらしい
real,12
type,3		!要素ナンバー3のこと 3ということはtarge170
cmsel,s,a_targ	!Cuの表面選択
nsla,s,1	!選択されたエリアに関する節点の選択
esurf		!既存の要素の自由表面に重ねて要素を生成とのこと
type,8		!評価しない接合面
cmsel,s,a_cont	!はんだ下面の選択
nsla,s,1	!選択されたエリアに関する節点の選択
esurf
allsel

allsel
!Create Contact Pair
asel,s,,,2	!
cm,a_cont,area	!a_contという名をつける
asel,s,,,47	!
cm,a_targ,area	!a_targという名をつける  TARGがくっつける相手の（通常大きいほうの）面
allsel
r,13
rmodif,13,14,1e6		!14は接触コンダクタンスのこと CONTA174の リアルコンスタントのことらしい
real,13
type,3		!要素ナンバー3のこと 3ということはtarge170
cmsel,s,a_targ	!Cuの表面選択
nsla,s,1	!選択されたエリアに関する節点の選択
esurf		!既存の要素の自由表面に重ねて要素を生成とのこと
type,8		!評価しない接合面
cmsel,s,a_cont	!はんだ下面の選択
nsla,s,1	!選択されたエリアに関する節点の選択
esurf
allsel

!-------細かい樹脂 バス厚みとの上下面接触
*DO,ii,1,4,1
*IF,ii,EQ,1,THEN
	jj=17
*ENDIF
*IF,ii,EQ,2,THEN
	jj=26
*ENDIF
*IF,ii,EQ,3,THEN
	jj=31
*ENDIF
*IF,ii,EQ,4,THEN
	jj=35
*ENDIF
allsel
!Create Contact Pair
asel,s,,,jj	!
cm,a_cont,area	!a_contという名をつける
asel,s,,,36	!
cm,a_targ,area	!a_targという名をつける  TARGがくっつける相手の（通常大きいほうの）面
allsel
r,14+(ii-1)
rmodif,14+(ii-1),14,1e6		!14は接触コンダクタンスのこと CONTA174の リアルコンスタントのことらしい
real,14+(ii-1)
type,3		!要素ナンバー3のこと 3ということはtarge170
cmsel,s,a_targ	!Cuの表面選択
nsla,s,1	!選択されたエリアに関する節点の選択
esurf		!既存の要素の自由表面に重ねて要素を生成とのこと
type,5		!評価しない接合面
cmsel,s,a_cont	!はんだ下面の選択
nsla,s,1	!選択されたエリアに関する節点の選択
esurf
allsel
*ENDDO

*DO,ii,1,4,1
*IF,ii,EQ,1,THEN
	jj=18
*ENDIF
*IF,ii,EQ,2,THEN
	jj=22
*ENDIF
*IF,ii,EQ,3,THEN
	jj=27
*ENDIF
*IF,ii,EQ,4,THEN
	jj=32
*ENDIF
allsel
!Create Contact Pair
asel,s,,,jj	!
cm,a_cont,area	!a_contという名をつける
asel,s,,,47	!
cm,a_targ,area	!a_targという名をつける  TARGがくっつける相手の（通常大きいほうの）面
allsel
r,18+(ii-1)
rmodif,18+(ii-1),14,1e6		!14は接触コンダクタンスのこと CONTA174の リアルコンスタントのことらしい
real,18+(ii-1)
type,3		!要素ナンバー3のこと 3ということはtarge170
cmsel,s,a_targ	!Cuの表面選択
nsla,s,1	!選択されたエリアに関する節点の選択
esurf		!既存の要素の自由表面に重ねて要素を生成とのこと
type,5		!評価しない接合面
cmsel,s,a_cont	!はんだ下面の選択
nsla,s,1	!選択されたエリアに関する節点の選択
esurf
allsel
*ENDDO

!Tバス脇の下樹脂のTバスとの接合
*DO,ii,1,2,1
*IF,ii,EQ,1,THEN
	jj=52
*ENDIF
*IF,ii,EQ,2,THEN
	jj=60
*ENDIF
allsel
!Create Contact Pair
asel,s,,,66+(ii-1)	!
cm,a_cont,area	!a_contという名をつける
asel,s,,,jj	!
cm,a_targ,area	!a_targという名をつける  TARGがくっつける相手の（通常大きいほうの）面
allsel
r,22+(ii-1)
rmodif,22+(ii-1),14,1e6		!14は接触コンダクタンスのこと CONTA174の リアルコンスタントのことらしい
real,22+(ii-1)
type,3		!要素ナンバー3のこと 3ということはtarge170
cmsel,s,a_targ	!Cuの表面選択
nsla,s,1	!選択されたエリアに関する節点の選択
esurf		!既存の要素の自由表面に重ねて要素を生成とのこと
type,5		!評価しない接合面
cmsel,s,a_cont	!はんだ下面の選択
nsla,s,1	!選択されたエリアに関する節点の選択
esurf
allsel
*ENDDO

!Tバスとその上下の樹脂の接合
*DO,ii,1,4,1
*IF,ii,EQ,1,THEN
	jj=53
*ENDIF
*IF,ii,EQ,2,THEN
	jj=58
*ENDIF
*IF,ii,EQ,3,THEN
	jj=63
*ENDIF
*IF,ii,EQ,4,THEN
	jj=69
*ENDIF
allsel
!Create Contact Pair
asel,s,,,jj	!
cm,a_cont,area	!a_contという名をつける
asel,s,,,70	!
cm,a_targ,area	!a_targという名をつける  TARGがくっつける相手の（通常大きいほうの）面
allsel
r,24+(ii-1)
rmodif,24+(ii-1),14,1e6		!14は接触コンダクタンスのこと CONTA174の リアルコンスタントのことらしい
real,24+(ii-1)
type,3		!要素ナンバー3のこと 3ということはtarge170
cmsel,s,a_targ	!Cuの表面選択
nsla,s,1	!選択されたエリアに関する節点の選択
esurf		!既存の要素の自由表面に重ねて要素を生成とのこと
type,5		!評価しない接合面
cmsel,s,a_cont	!はんだ下面の選択
nsla,s,1	!選択されたエリアに関する節点の選択
esurf
allsel
*ENDDO

*DO,ii,1,4,1
*IF,ii,EQ,1,THEN
	jj=48
*ENDIF
*IF,ii,EQ,2,THEN
	jj=54
*ENDIF
*IF,ii,EQ,3,THEN
	jj=59
*ENDIF
*IF,ii,EQ,4,THEN
	jj=64
*ENDIF
allsel
!Create Contact Pair
asel,s,,,jj	!
cm,a_cont,area	!a_contという名をつける
asel,s,,,81	!
cm,a_targ,area	!a_targという名をつける  TARGがくっつける相手の（通常大きいほうの）面
allsel
r,28+(ii-1)
rmodif,28+(ii-1),14,1e6		!14は接触コンダクタンスのこと CONTA174の リアルコンスタントのことらしい
real,28+(ii-1)
type,3		!要素ナンバー3のこと 3ということはtarge170
cmsel,s,a_targ	!Cuの表面選択
nsla,s,1	!選択されたエリアに関する節点の選択
esurf		!既存の要素の自由表面に重ねて要素を生成とのこと
type,5		!評価しない接合面
cmsel,s,a_cont	!はんだ下面の選択
nsla,s,1	!選択されたエリアに関する節点の選択
esurf
allsel
*ENDDO

!センター下側の樹脂の側面接合 相手は62,68,74,80
*DO,ii,1,4,1
allsel
!Create Contact Pair
asel,s,,,62+(ii-1)*6	!
cm,a_cont,area	!a_contという名をつける
asel,s,,,84	!
cm,a_targ,area	!a_targという名をつける  TARGがくっつける相手の（通常大きいほうの）面
allsel
r,32+(ii-1)
rmodif,32+(ii-1),14,1e6		!14は接触コンダクタンスのこと CONTA174の リアルコンスタントのことらしい
real,32+(ii-1)
type,3		!要素ナンバー3のこと 3ということはtarge170
cmsel,s,a_targ	!Cuの表面選択
nsla,s,1	!選択されたエリアに関する節点の選択
esurf		!既存の要素の自由表面に重ねて要素を生成とのこと
type,5		!評価しない接合面
cmsel,s,a_cont	!はんだ下面の選択
nsla,s,1	!選択されたエリアに関する節点の選択
esurf
allsel
*ENDDO

allsel
!Create Contact Pair
asel,s,,,85	!
cm,a_cont,area	!a_contという名をつける
asel,s,,,89	!
cm,a_targ,area	!a_targという名をつける  TARGがくっつける相手の（通常大きいほうの）面
allsel
r,36
rmodif,36,14,1e6		!14は接触コンダクタンスのこと CONTA174の リアルコンスタントのことらしい
real,36
type,3		!要素ナンバー3のこと 3ということはtarge170
cmsel,s,a_targ	!Cuの表面選択
nsla,s,1	!選択されたエリアに関する節点の選択
esurf		!既存の要素の自由表面に重ねて要素を生成とのこと
type,5		!評価しない接合面
cmsel,s,a_cont	!はんだ下面の選択
nsla,s,1	!選択されたエリアに関する節点の選択
esurf

!センター中央の樹脂の側面接合 56,61,73,79
*DO,ii,1,4,1
*IF,ii,EQ,1,THEN
	jj=56
*ENDIF
*IF,ii,EQ,2,THEN
	jj=61
*ENDIF
*IF,ii,EQ,3,THEN
	jj=73
*ENDIF
*IF,ii,EQ,4,THEN
	jj=79
*ENDIF
allsel
!Create Contact Pair
asel,s,,,jj	!
cm,a_cont,area	!a_contという名をつける
asel,s,,,89	!
cm,a_targ,area	!a_targという名をつける  TARGがくっつける相手の（通常大きいほうの）面
allsel
r,37+(ii-1)
rmodif,37+(ii-1),14,1e6		!14は接触コンダクタンスのこと CONTA174の リアルコンスタントのことらしい
real,37+(ii-1)
type,3		!要素ナンバー3のこと 3ということはtarge170
cmsel,s,a_targ	!Cuの表面選択
nsla,s,1	!選択されたエリアに関する節点の選択
esurf		!既存の要素の自由表面に重ねて要素を生成とのこと
type,5		!評価しない接合面
cmsel,s,a_cont	!はんだ下面の選択
nsla,s,1	!選択されたエリアに関する節点の選択
esurf
allsel
*ENDDO

*DO,ii,1,5,1
*IF,ii,EQ,1,THEN
	jj=23
*ENDIF
*IF,ii,EQ,2,THEN
	jj=28
*ENDIF
*IF,ii,EQ,3,THEN
	jj=37
*ENDIF
*IF,ii,EQ,4,THEN
	jj=43
*ENDIF
*IF,ii,EQ,5,THEN
	jj=95
*ENDIF
allsel
!Create Contact Pair
asel,s,,,jj	!
cm,a_cont,area	!a_contという名をつける
asel,s,,,91	!
cm,a_targ,area	!a_targという名をつける  TARGがくっつける相手の（通常大きいほうの）面
allsel
r,41+(ii-1)
rmodif,41+(ii-1),14,1e6		!14は接触コンダクタンスのこと CONTA174の リアルコンスタントのことらしい
real,41+(ii-1)
type,3		!要素ナンバー3のこと 3ということはtarge170
cmsel,s,a_targ	!Cuの表面選択
nsla,s,1	!選択されたエリアに関する節点の選択
esurf		!既存の要素の自由表面に重ねて要素を生成とのこと
type,5		!評価しない接合面
cmsel,s,a_cont	!はんだ下面の選択
nsla,s,1	!選択されたエリアに関する節点の選択
esurf
allsel
*ENDDO

!センター　上樹脂の側面
*DO,ii,1,4,1
*IF,ii,EQ,1,THEN
	jj=30
*ENDIF
*IF,ii,EQ,2,THEN
	jj=34
*ENDIF
*IF,ii,EQ,3,THEN
	jj=40
*ENDIF
*IF,ii,EQ,4,THEN
	jj=46
*ENDIF
allsel
!Create Contact Pair
asel,s,,,jj	!
cm,a_cont,area	!a_contという名をつける
asel,s,,,96	!
cm,a_targ,area	!a_targという名をつける  TARGがくっつける相手の（通常大きいほうの）面
allsel
r,46+(ii-1)
rmodif,46+(ii-1),14,1e6		!14は接触コンダクタンスのこと CONTA174の リアルコンスタントのことらしい
real,46+(ii-1)
type,3		!要素ナンバー3のこと 3ということはtarge170
cmsel,s,a_targ	!Cuの表面選択
nsla,s,1	!選択されたエリアに関する節点の選択
esurf		!既存の要素の自由表面に重ねて要素を生成とのこと
type,5		!評価しない接合面
cmsel,s,a_cont	!はんだ下面の選択
nsla,s,1	!選択されたエリアに関する節点の選択
esurf
allsel
*ENDDO

!------下側の大樹脂接合 42,76,82,88,94
*DO,ii,1,5,1
*IF,ii,EQ,1,THEN
	jj=42
*ENDIF
*IF,ii,EQ,2,THEN
	jj=76
*ENDIF
*IF,ii,EQ,3,THEN
	jj=82
*ENDIF
*IF,ii,EQ,4,THEN
	jj=88
*ENDIF
*IF,ii,EQ,5,THEN
	jj=94
*ENDIF
allsel
!Create Contact Pair
asel,s,,,jj	!
cm,a_cont,area	!a_contという名をつける
asel,s,,,105	!
cm,a_targ,area	!a_targという名をつける  TARGがくっつける相手の（通常大きいほうの）面
allsel
r,50+(ii-1)
rmodif,50+(ii-1),14,1e6		!14は接触コンダクタンスのこと CONTA174の リアルコンスタントのことらしい
real,50+(ii-1)
type,3		!要素ナンバー3のこと 3ということはtarge170
cmsel,s,a_targ	!Cuの表面選択
nsla,s,1	!選択されたエリアに関する節点の選択
esurf		!既存の要素の自由表面に重ねて要素を生成とのこと
type,5		!評価しない接合面
cmsel,s,a_cont	!はんだ下面の選択
nsla,s,1	!選択されたエリアに関する節点の選択
esurf
allsel
*ENDDO

!------上側の大樹脂接合 41,75,87,93,99
*DO,ii,1,5,1
*IF,ii,EQ,1,THEN
	jj=41
*ENDIF
*IF,ii,EQ,2,THEN
	jj=75
*ENDIF
*IF,ii,EQ,3,THEN
	jj=87
*ENDIF
*IF,ii,EQ,4,THEN
	jj=93
*ENDIF
*IF,ii,EQ,5,THEN
	jj=99
*ENDIF
allsel
!Create Contact Pair
asel,s,,,jj	!
cm,a_cont,area	!a_contという名をつける
asel,s,,,106	!
cm,a_targ,area	!a_targという名をつける  TARGがくっつける相手の（通常大きいほうの）面
allsel
r,55+(ii-1)
rmodif,55+(ii-1),14,1e6		!14は接触コンダクタンスのこと CONTA174の リアルコンスタントのことらしい
real,55+(ii-1)
type,3		!要素ナンバー3のこと 3ということはtarge170
cmsel,s,a_targ	!Cuの表面選択
nsla,s,1	!選択されたエリアに関する節点の選択
esurf		!既存の要素の自由表面に重ねて要素を生成とのこと
type,5		!評価しない接合面
cmsel,s,a_cont	!はんだ下面の選択
nsla,s,1	!選択されたエリアに関する節点の選択
esurf
allsel
*ENDDO

!-------荷重と境界条件
ASEL,S,AREA,,14
GSUM
*GET,S1,AREA,14,AREA,
P1=LOAD/S1

/SOLUTION
ANTYPE,0
toffst,273.15

ALLSEL,ALL
SFA,14,,PRES,P1
ALLSEL,ALL

ALLSEL,ALL
NSEL,S,LOC,Y,TBUS(1,1,1,2)	!Y位置が下側バス下面を選択　この点群をY方向拘束する

D,ALL, ,0, , , ,,UY,, , ,

ALLSEL,ALL
NSEL,S,LOC,X,TBUS(1,1,2,1)	!Y位置が下側バス下面を選択　この点群をY方向拘束する
NSEL,R,LOC,Y,TBUS(1,1,2,2)	!Y位置が下側バス下面を選択　この点群をY方向拘束する
NSEL,R,LOC,Z,TBUS(1,1,2,3)	!Y位置が下側バス下面を選択　この点群をY方向拘束する

D,ALL, ,0, , , ,UX,UY,UZ, , ,  !下面X=0でZ下面の点を全拘束

ALLSEL,ALL
NSEL,S,LOC,X,0
DSYM,SYMM,X, ,
ALLSEL,ALL

SOLVE

!----------ポスト処理----------------------------------
/POST1

SET, , ,1, ,1, , !1サイクル目

ESEL,S,TYPE,,8	!銅バスバと樹脂の接合面
AVPRIN,0, ,
etable,F_SOL_H,cont,sfric	!せん断
etable,P_SOL_H,cont,pres	!引っ張り

ESORT,ETAB,F_SOL_H,0,1		!0は降順　1は絶対値
PRETAB,F_SOL_H

*GET,MAX_F_SOL_H,SORT,,Max
*GET,ELM_F_SOL_H,SORT,,IMax	!IMAXは最大値を有する節点の要素番号
*GET,ELM_F_SOL_HX,ELEM,ELM_F_SOL_H,CENT,X
*GET,ELM_F_SOL_HY,ELEM,ELM_F_SOL_H,CENT,Y
*GET,ELM_F_SOL_HZ,ELEM,ELM_F_SOL_H,CENT,Z

ESORT,ETAB,P_SOL_H,0,1		!0は降順　1は絶対値
PRETAB,P_SOL_H

*GET,MAX_P_SOL_H,SORT,,Max	!引張を評価するのでMINをピックアップする
*GET,ELM_P_SOL_H,SORT,,IMax	!IMAXは最大値を有する節点の要素番号
*GET,ELM_P_SOL_HX,ELEM,ELM_P_SOL_H,CENT,X
*GET,ELM_P_SOL_HY,ELEM,ELM_P_SOL_H,CENT,Y
*GET,ELM_P_SOL_HZ,ELEM,ELM_P_SOL_H,CENT,Z

MAX_P_SOL_H=-1*MAX_P_SOL_H	!符号をひっくりかえす

ALLSEL

VSEL,S,MAT,,7	!樹脂を選択
CM,RESIN,VOLU	!樹脂というコンポーネント名
ALLSEL


CMSEL,S,RESIN,VOLU
ESLV,S,		!選択されたボリュームに対する要素の選択
NSLE,S,		!選択された要素の接点の選択
AVPRIN,0, ,
ETABLE,R_EPEL_H,EPEL,EQV  !相当弾性ひずみEPELは弾性ひずみ

ESORT,ETAB,R_EPEL_H,0,1		!0は降順　1は絶対値
PRETAB,R_EPEL_H

*GET,MAX_R_EPEL_H,SORT,,Max
*GET,ELM_R_EPEL_H,SORT,,IMax	!IMAXは最大値を有する節点の要素番号
*GET,ELM_R_EPEL_HX,ELEM,ELM_R_EPEL_H,CENT,X
*GET,ELM_R_EPEL_HY,ELEM,ELM_R_EPEL_H,CENT,Y
*GET,ELM_R_EPEL_HZ,ELEM,ELM_R_EPEL_H,CENT,Z
